*NODE, NSET=GLOBAL
  1,   0.,       0.,  0.
  2,   1.,       0.,  0.
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****************************************
****************************************
*NSET, NSET=Gbot
1,2,67
*NSET, NSET=Gtop
34,35,162
*NSET, NSET=GtopPOR
34,35
*NSET, NSET=Gleft
1,35,36,37,38,39
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*NSET, NSET=Gright
2,3,4,5,6,7
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*NSET, NSET=GleftPOR
 1,66,65,64,63,62
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****************************************
***
*** List dofs 1,2 (displacement x, y) for all nodes,
*** then followed by dof 8 (fluid pore pressure p)
*** for nodes 1 through 4 (stop at node 5)
***
*USER ELEMENT, TYPE=U101, NODES=8, COORDINATES=2, VARIABLES=1, PROPERTIES=6, UNSYMM
1,2
1,8
5,
****************************************
***
*** Lambda = 0.0 implies nu = 0.0
***
*PARAMETER
Lambda    = 0.0
Gmod      = 35.e6
grav      = 10.0
nporo     = 0.3
density_s = 2000.
density_w = 1000.
density   = nporo*density_w + (1.0-nporo)*density_s
***
*** applied pressure
***
sigbar  = 90.e3
***
*** saturated unit weight
***
gamma = density*grav
***
*** unit weight of water
***
gammaF = density_w*grav
***
*** hydraulic permeability (m/sec)
***
hydraulic_conductivity = 1.e-5
************************************
*UEL PROPERTY,ELSET=Pporous
<Lambda>,<Gmod>,<gamma>,<gammaF>,<hydraulic_conductivity>,<grav>
************************************
*ELEMENT, TYPE=U101, ELSET=Pporous
 1,  1,  2,  3, 66,  67,  68,  69,  70
 2, 66,  3,  4, 65,  69,  71,  72,  73
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************************************
*** dummy elements
*ELEMENT, TYPE=CPE8R, ELSET=Pdummy
1001,  1,  2,  3, 66,  67,  68,  69,  70
1002, 66,  3,  4, 65,  69,  71,  72,  73
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************************************
*SOLID SECTION, ELSET=Pdummy, MATERIAL=Mdummy
1.0
************************************
*MATERIAL,NAME=Mdummy
*ELASTIC
1.e-16,0.
************************************
*** Dummy material to force coupled procedure
*** (not attached to any elements)
*MATERIAL,NAME=DUMMY2
*ELASTIC
1.0,
*PERMEABILITY,SPECIFIC=1.0
1.0,
************************************
** Define surface on dummy element
** used to generate appropriate
** nodal loads due to surface pressure
**
*SURFACE,NAME=TopSurfDummy,TYPE=ELEMENT
1032,S3
************************************
************************************
*** Gravity only
*** - for this step, set hydraulic
***   conductivity to larger value
***   (in UEL code) to get to
***   hydrostatic condition faster
************************************
************************************
*STEP, INC=99999, UNSYMM=YES
Gravity only
*SOILS,CONSOLIDATION
1.,200.,
***
*** fix displacement at base of column
*** zero pressure at top
***
*BOUNDARY
GtopPOR,8
Gbot,2
Gleft,1
Gright,1
************************************
*OUTPUT, FIELD, FREQ=1
*Node Output, nset=GLOBAL
 RF, U, POR
**
** HISTORY OUTPUT
**
*Output, HISTORY, FREQ=1
*node output, nset=Gtop
U, POR
*node output, nset=Gbot
RF, POR
*END STEP
************************************
************************************
*STEP, INC=99999, UNSYMM=YES
Gravity + Load jump + Consolidate
*SOILS,CONSOLIDATION
1.,500.,
*DSLOAD
TopSurfDummy,P,90.e3
************************************
*OUTPUT, FIELD, FREQ=1
*Node Output, nset=GLOBAL
 RF, U, POR
**
** HISTORY OUTPUT
**
*Output, HISTORY, FREQ=1
*node output, nset=Gtop
U, POR
*node output, nset=Gbot
RF, POR
*END STEP
