*NODE
   1,  0.,  0.
   2,  1.,  0.
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***********************************************
*USER ELEMENT, TYPE=U101, NODES=8, COORDINATES=2, properties=10, variables=36, UNSYMM
1,2
1,4
5,
***********************************************
*parameter
rhoS   = 2000.
rhoF   = 1000.
nPoro  = 0.333
Gmod   = 15.e6
Nu     = 0.3
Kfluid = 1.e10
kperm  = 1.e-4
grav   = 10.
damp_alpha = 0.
damp_beta  = 0.
*******************************************************************
*UEL PROPERTY,ELSET=Porous
<Gmod>,<Nu>,<rhoS>,<rhoF>,<nPoro>,<kperm>,<Kfluid>,<grav>
<damp_alpha>,<damp_beta>
*******************************************************************
*ELEMENT, TYPE=U101, ELSET=Porous
  1,   1,   2,  41,  40, 122, 125, 197, 123
  2,   2,   3,  42,  41, 124, 127, 198, 125
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*******************************************************************
*ELEMENT, TYPE=CPE8R, ELSET=dummy
1001,   1,   2,  41,  40, 122, 125, 197, 123
1002,   2,   3,  42,  41, 124, 127, 198, 125
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****************************************
*SOLID SECTION, ELSET=dummy, MATERIAL=MatDummy
1.0
*MATERIAL,NAME=MatDummy
*ELASTIC
1.e-16,0.
*DENSITY
1.e-12
****************************************
*NSET, NSET=sides
1,11,12,13,14,15
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*NSET, NSET=base
1,2,3,4,5,6
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*NSET, NSET=top
21,22,23,24,25,26
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*NSET, NSET=BotCorner
1
*NSET, NSET=TopCorner
31
****************************************
*INCLUDE,INPUT=amplitude_stripfooting.inp
****
*SURFACE,NAME=PresSurf,TYPE=ELEMENT
1091,S3
****************************************
*BOUNDARY
sides,1,1
base,2,2
top,4,4
**
** Step 1 - Dynamic
**
*STEP, NLGEOM=NO, INC=9999999, UNSYMM=YES
*DYNAMIC,DIRECT,NOHAF,INITIAL=NO,IMPACT=NO,ALPHA=0.0,BETA=0.25,GAMMA=0.5
0.001,0.4,
**
** FORCING FUNCTION
*DSLOAD,AMPLITUDE=LOAD_AMP
PresSurf,P,1.e6
**
**
** FIELD OUTPUT
**
*OUTPUT, FIELD, FREQUENCY=10
*NODE OUTPUT
A,U,V
**
**
** HISTORY OUTPUT
**
*OUTPUT, HISTORY, FREQUENCY=1
*NODE OUTPUT, NSET=BotCorner
U,V,A
*NODE OUTPUT, NSET=TopCorner
U,V,A
*End Step
****
